<?xml version="1.0" encoding="ISO-8859-1"?>
<neuroml xmlns="http://www.neuroml.org/schema/neuroml2" xmlns:xsi="http://www.w3.org/2001/XMLSchema-instance" xsi:schemaLocation="http://www.neuroml.org/schema/neuroml2 https://raw.github.com/NeuroML/NeuroML2/development/Schemas/NeuroML2/NeuroML_v2beta4.xsd" id="NeuroML_ionChannel">

    <notes>NeuroML file containing a single ion channel</notes>

    <ionChannel id="nap" conductance="1pS" type="ionChannelHH" species="na">

        <notes>Na+ persistent channel (used in distal oblique dendrites)</notes>

        <gateHHInstantaneous id="n" instances="3">
            <steadyState type="HHSigmoidVariable" rate="1" midpoint="-50.4mV" scale="4.5mV"/>
        </gateHHInstantaneous>

    </ionChannel>

</neuroml>
